# OpenSim document version 40000
ScaleTool Edit_3_Combined_Sheep_Hind_Limb_Model_Lerner_et_al_Scaled:
  mass: 37.6 [kg]
  height: -1
  age: -1
  GenericModelMaker:
    model_file: G:\My Drive\MoCap - Aaron\HPP Sheep\Sheep Code From Jo\OpenSim Items/Models/Edit_3_Combined_Sheep_Hind_Limb_Model_Lerner_et_al.osim
    marker_set_file: G:\My Drive\MoCap - Aaron\HPP Sheep\Sheep Code From Jo\OpenSim Items/XML Files/BMEL_Combined_Markerset_SinglePelvis_4_NoRRP.xml
  ModelScaler:
    apply: true
    scaling_order: measurements
    marker_file: G:\My Drive\MoCap - Aaron\HPP Sheep\Sheep Code From Jo\OpenSim Items/Data/BMEL-19-07-001-19-07-15-Cal01_Combined_Rear.trc
    time_range: 0 0.1
    preserve_mass_distribution: true
    output_model_file: G:\My Drive\MoCap - Aaron\HPP Sheep\Sheep Code From Jo\OpenSim Items/Models/Edit_3_Combined_Sheep_Hind_Limb_Model_Lerner_et_al_Scaled.osim
    output_scale_file: G:\My Drive\MoCap - Aaron\HPP Sheep\Sheep Code From Jo\OpenSim Items/XML Files/ScaleFactorSettingsCombinedSinglePelvis.xml
    MeasurementSet:
      Measurement Femur_L: apply=true
        MarkerPair: markers=(LRGT LRCT)
        BodyScale femur_L: axes=(X Y Z)
      Measurement Femur_R: apply=true
        MarkerPair: markers=(RRGT RRCT)
        BodyScale femur_R: axes=(X Y Z)
      Measurement Tibia_L: apply=true
        MarkerPair: markers=(LRCT LRMal)
        BodyScale tibia_L: axes=(X Y Z)
      Measurement Tibia_R: apply=true
        MarkerPair: markers=(RRCT RRMAL)
        BodyScale tibia_R: axes=(X Y Z)
      Measurement Hock_L: apply=true
        MarkerPair: markers=(LRMal LRFMT)
        BodyScale hock_L: axes=(X Y Z)
      Measurement Hock_R: apply=true
        MarkerPair: markers=(RRMAL RRFMT)
        BodyScale hock_R: axes=(X Y Z)
      Measurement Phal_L: apply=false
        MarkerPair: markers=(LRFMT LRMP)
      Measurement Phal_R: apply=false
        MarkerPair: markers=(RRFMT RRMP)
      Measurement Pelvis_Cx: apply=true
        MarkerPair: markers=(RTC RRGT)
        MarkerPair: markers=(LTC LRGT)
        BodyScale pelvis_C: axes=(X Y)
      Measurement Pelvis_Cz: apply=true
        MarkerPair: markers=(RTC LTC)
        MarkerPair: markers=(RRGT LRGT)
        BodyScale pelvis_C: axes=Z
  MarkerPlacer:
    apply: true
    marker_file: G:\My Drive\MoCap - Aaron\HPP Sheep\Sheep Code From Jo\OpenSim Items/Data/BMEL-19-07-001-19-07-15-Cal01_Combined_Rear.trc
    time_range: 0 0.1
    output_model_file: G:\My Drive\MoCap - Aaron\HPP Sheep\Sheep Code From Jo\OpenSim Items/Models/Edit_3_Combined_Sheep_Hind_Limb_Model_Lerner_et_al_Scaled.osim
    output_marker_file: G:\My Drive\MoCap - Aaron\HPP Sheep\Sheep Code From Jo\OpenSim Items/XML Files/Moved_BMEL_Combined_Markerset_SinglePelvis_4_NoRRP.xml
    max_marker_movement: -1
    IKTaskSet:
      IKMarkerTask RTC: apply=true weight=100
      IKMarkerTask RIC: apply=false weight=1
      IKMarkerTask RRGT: apply=true weight=100
      IKMarkerTask RRMF: apply=false weight=1
      IKMarkerTask RRMT: apply=false weight=1
      IKMarkerTask RRCT: apply=true weight=100
      IKMarkerTask RRMP: apply=true weight=100
      IKMarkerTask RRFMT: apply=true weight=100
      IKMarkerTask RRMAL: apply=true weight=100
      IKMarkerTask RRMMT: apply=false weight=1
      IKMarkerTask LTC: apply=true weight=100
      IKMarkerTask LIC: apply=false weight=1
      IKMarkerTask LRGT: apply=true weight=100
      IKMarkerTask LRMF: apply=false weight=1
      IKMarkerTask LRMT: apply=false weight=1
      IKMarkerTask LRCT: apply=true weight=100
      IKMarkerTask LRMP: apply=true weight=100
      IKMarkerTask LRFMT: apply=true weight=100
      IKMarkerTask LRMal: apply=true weight=100
      IKMarkerTask LRMMT: apply=false weight=1
      IKMarkerTask RTC: apply=true weight=1
      IKMarkerTask RIC: apply=true weight=1
      IKMarkerTask RRGT: apply=true weight=1
      IKMarkerTask RRMF: apply=true weight=1
      IKMarkerTask RRMT: apply=true weight=1
      IKMarkerTask RRCT: apply=true weight=1
      IKMarkerTask RRMP: apply=true weight=1
      IKMarkerTask RRFMT: apply=true weight=1
      IKMarkerTask RRMAL: apply=true weight=1
      IKMarkerTask RRMMT: apply=true weight=1
      IKMarkerTask LTC: apply=true weight=1
      IKMarkerTask LIC: apply=true weight=1
      IKMarkerTask LRGT: apply=true weight=1
      IKMarkerTask LRMF: apply=true weight=1
      IKMarkerTask LRMT: apply=true weight=1
      IKMarkerTask LRCT: apply=true weight=1
      IKMarkerTask LRMP: apply=true weight=1
      IKMarkerTask LRFMT: apply=true weight=1
      IKMarkerTask LRMal: apply=true weight=1
      IKMarkerTask LRMMT: apply=true weight=1
      IKMarkerTask RTC: apply=true weight=1
      IKMarkerTask RIC: apply=true weight=1
      IKMarkerTask RRGT: apply=true weight=1
      IKMarkerTask RRMF: apply=true weight=1
      IKMarkerTask RRMT: apply=true weight=1
      IKMarkerTask RRCT: apply=true weight=1
      IKMarkerTask RRMP: apply=true weight=1
      IKMarkerTask RRFMT: apply=true weight=1
      IKMarkerTask RRMAL: apply=true weight=1
      IKMarkerTask RRMMT: apply=true weight=1
      IKMarkerTask LTC: apply=true weight=1
      IKMarkerTask LIC: apply=true weight=1
      IKMarkerTask LRGT: apply=true weight=1
      IKMarkerTask LRMF: apply=true weight=1
      IKMarkerTask LRMT: apply=true weight=1
      IKMarkerTask LRCT: apply=true weight=1
      IKMarkerTask LRMP: apply=true weight=1
      IKMarkerTask LRFMT: apply=true weight=1
      IKMarkerTask LRMal: apply=true weight=1
      IKMarkerTask LRMMT: apply=true weight=1
      IKMarkerTask RTC: apply=true weight=1
      IKMarkerTask RIC: apply=true weight=1
      IKMarkerTask RRGT: apply=true weight=1
      IKMarkerTask RRMF: apply=true weight=1
      IKMarkerTask RRMT: apply=true weight=1
      IKMarkerTask RRCT: apply=true weight=1
      IKMarkerTask RRMP: apply=true weight=1
      IKMarkerTask RRFMT: apply=true weight=1
      IKMarkerTask RRMAL: apply=true weight=1
      IKMarkerTask RRMMT: apply=true weight=1
      IKMarkerTask LTC: apply=true weight=1
      IKMarkerTask LIC: apply=true weight=1
      IKMarkerTask LRGT: apply=true weight=1
      IKMarkerTask LRMF: apply=true weight=1
      IKMarkerTask LRMT: apply=true weight=1
      IKMarkerTask LRCT: apply=true weight=1
      IKMarkerTask LRMP: apply=true weight=1
      IKMarkerTask LRFMT: apply=true weight=1
      IKMarkerTask LRMal: apply=true weight=1
      IKMarkerTask LRMMT: apply=true weight=1
      IKMarkerTask RTC: apply=true weight=1
      IKMarkerTask RIC: apply=true weight=1
      IKMarkerTask RRGT: apply=true weight=1
      IKMarkerTask RRMF: apply=true weight=1
      IKMarkerTask RRMT: apply=true weight=1
      IKMarkerTask RRCT: apply=true weight=1
      IKMarkerTask RRMP: apply=true weight=1
      IKMarkerTask RRFMT: apply=true weight=1
      IKMarkerTask RRMAL: apply=true weight=1
      IKMarkerTask RRMMT: apply=true weight=1
      IKMarkerTask LTC: apply=true weight=1
      IKMarkerTask LIC: apply=true weight=1
      IKMarkerTask LRGT: apply=true weight=1
      IKMarkerTask LRMF: apply=true weight=1
      IKMarkerTask LRMT: apply=true weight=1
      IKMarkerTask LRCT: apply=true weight=1
      IKMarkerTask LRMP: apply=true weight=1
      IKMarkerTask LRFMT: apply=true weight=1
      IKMarkerTask LRMal: apply=true weight=1
      IKMarkerTask LRMMT: apply=true weight=1
      IKMarkerTask RTC: apply=true weight=1
      IKMarkerTask RIC: apply=true weight=1
      IKMarkerTask RRGT: apply=true weight=1
      IKMarkerTask RRMF: apply=true weight=1
      IKMarkerTask RRMT: apply=true weight=1
      IKMarkerTask RRCT: apply=true weight=1
      IKMarkerTask RRMP: apply=true weight=1
      IKMarkerTask RRFMT: apply=true weight=1
      IKMarkerTask RRMAL: apply=true weight=1
      IKMarkerTask RRMMT: apply=true weight=1
      IKMarkerTask LTC: apply=true weight=1
      IKMarkerTask LIC: apply=true weight=1
      IKMarkerTask LRGT: apply=true weight=1
      IKMarkerTask LRMF: apply=true weight=1
      IKMarkerTask LRMT: apply=true weight=1
      IKMarkerTask LRCT: apply=true weight=1
      IKMarkerTask LRMP: apply=true weight=1
      IKMarkerTask LRFMT: apply=true weight=1
      IKMarkerTask LRMal: apply=true weight=1
      IKMarkerTask LRMMT: apply=true weight=1
      IKMarkerTask RTC: apply=true weight=1
      IKMarkerTask RIC: apply=true weight=1
      IKMarkerTask RRGT: apply=true weight=1
      IKMarkerTask RRMF: apply=true weight=1
      IKMarkerTask RRMT: apply=true weight=1
      IKMarkerTask RRCT: apply=true weight=1
      IKMarkerTask RRMP: apply=true weight=1
      IKMarkerTask RRFMT: apply=true weight=1
      IKMarkerTask RRMAL: apply=true weight=1
      IKMarkerTask RRMMT: apply=true weight=1
      IKMarkerTask LTC: apply=true weight=1
      IKMarkerTask LIC: apply=true weight=1
      IKMarkerTask LRGT: apply=true weight=1
      IKMarkerTask LRMF: apply=true weight=1
      IKMarkerTask LRMT: apply=true weight=1
      IKMarkerTask LRCT: apply=true weight=1
      IKMarkerTask LRMP: apply=true weight=1
      IKMarkerTask LRFMT: apply=true weight=1
      IKMarkerTask LRMal: apply=true weight=1
      IKMarkerTask LRMMT: apply=true weight=1
      IKMarkerTask RTC: apply=true weight=1
      IKMarkerTask RIC: apply=true weight=1
      IKMarkerTask RRGT: apply=true weight=1
      IKMarkerTask RRMF: apply=true weight=1
      IKMarkerTask RRMT: apply=true weight=1
      IKMarkerTask RRCT: apply=true weight=1
      IKMarkerTask RRMP: apply=true weight=1
      IKMarkerTask RRFMT: apply=true weight=1
      IKMarkerTask RRMAL: apply=true weight=1
      IKMarkerTask RRMMT: apply=true weight=1
      IKMarkerTask LTC: apply=true weight=1
      IKMarkerTask LIC: apply=true weight=1
      IKMarkerTask LRGT: apply=true weight=1
      IKMarkerTask LRMF: apply=true weight=1
      IKMarkerTask LRMT: apply=true weight=1
      IKMarkerTask LRCT: apply=true weight=1
      IKMarkerTask LRMP: apply=true weight=1
      IKMarkerTask LRFMT: apply=true weight=1
      IKMarkerTask LRMal: apply=true weight=1
      IKMarkerTask LRMMT: apply=true weight=1
      IKMarkerTask RTC: apply=true weight=1
      IKMarkerTask RIC: apply=true weight=1
      IKMarkerTask RRGT: apply=true weight=1
      IKMarkerTask RRMF: apply=true weight=1
      IKMarkerTask RRMT: apply=true weight=1
      IKMarkerTask RRCT: apply=true weight=1
      IKMarkerTask RRMP: apply=true weight=1
      IKMarkerTask RRFMT: apply=true weight=1
      IKMarkerTask RRMAL: apply=true weight=1
      IKMarkerTask RRMMT: apply=true weight=1
      IKMarkerTask LTC: apply=true weight=1
      IKMarkerTask LIC: apply=true weight=1
      IKMarkerTask LRGT: apply=true weight=1
      IKMarkerTask LRMF: apply=true weight=1
      IKMarkerTask LRMT: apply=true weight=1
      IKMarkerTask LRCT: apply=true weight=1
      IKMarkerTask LRMP: apply=true weight=1
      IKMarkerTask LRFMT: apply=true weight=1
      IKMarkerTask LRMal: apply=true weight=1
      IKMarkerTask LRMMT: apply=true weight=1
      IKMarkerTask RTC: apply=true weight=1
      IKMarkerTask RIC: apply=true weight=1
      IKMarkerTask RRGT: apply=true weight=1
      IKMarkerTask RRMF: apply=true weight=1
      IKMarkerTask RRMT: apply=true weight=1
      IKMarkerTask RRCT: apply=true weight=1
      IKMarkerTask RRMP: apply=true weight=1
      IKMarkerTask RRFMT: apply=true weight=1
      IKMarkerTask RRMAL: apply=true weight=1
      IKMarkerTask RRMMT: apply=true weight=1
      IKMarkerTask LTC: apply=true weight=1
      IKMarkerTask LIC: apply=true weight=1
      IKMarkerTask LRGT: apply=true weight=1
      IKMarkerTask LRMF: apply=true weight=1
      IKMarkerTask LRMT: apply=true weight=1
      IKMarkerTask LRCT: apply=true weight=1
      IKMarkerTask LRMP: apply=true weight=1
      IKMarkerTask LRFMT: apply=true weight=1
      IKMarkerTask LRMal: apply=true weight=1
      IKMarkerTask LRMMT: apply=true weight=1
      IKMarkerTask RTC: apply=true weight=1
      IKMarkerTask RIC: apply=true weight=1
      IKMarkerTask RRGT: apply=true weight=1
      IKMarkerTask RRMF: apply=true weight=1
      IKMarkerTask RRMT: apply=true weight=1
      IKMarkerTask RRCT: apply=true weight=1
      IKMarkerTask RRMP: apply=true weight=1
      IKMarkerTask RRFMT: apply=true weight=1
      IKMarkerTask RRMAL: apply=true weight=1
      IKMarkerTask RRMMT: apply=true weight=1
      IKMarkerTask LTC: apply=true weight=1
      IKMarkerTask LIC: apply=true weight=1
      IKMarkerTask LRGT: apply=true weight=1
      IKMarkerTask LRMF: apply=true weight=1
      IKMarkerTask LRMT: apply=true weight=1
      IKMarkerTask LRCT: apply=true weight=1
      IKMarkerTask LRMP: apply=true weight=1
      IKMarkerTask LRFMT: apply=true weight=1
      IKMarkerTask LRMal: apply=true weight=1
      IKMarkerTask LRMMT: apply=true weight=1
      IKMarkerTask RTC: apply=true weight=1
      IKMarkerTask RIC: apply=true weight=1
      IKMarkerTask RRGT: apply=true weight=1
      IKMarkerTask RRMF: apply=true weight=1
      IKMarkerTask RRMT: apply=true weight=1
      IKMarkerTask RRCT: apply=true weight=1
      IKMarkerTask RRMP: apply=true weight=1
      IKMarkerTask RRFMT: apply=true weight=1
      IKMarkerTask RRMAL: apply=true weight=1
      IKMarkerTask RRMMT: apply=true weight=1
      IKMarkerTask LTC: apply=true weight=1
      IKMarkerTask LIC: apply=true weight=1
      IKMarkerTask LRGT: apply=true weight=1
      IKMarkerTask LRMF: apply=true weight=1
      IKMarkerTask LRMT: apply=true weight=1
      IKMarkerTask LRCT: apply=true weight=1
      IKMarkerTask LRMP: apply=true weight=1
      IKMarkerTask LRFMT: apply=true weight=1
      IKMarkerTask LRMal: apply=true weight=1
      IKMarkerTask LRMMT: apply=true weight=1
      IKMarkerTask RTC: apply=true weight=1
      IKMarkerTask RIC: apply=true weight=1
      IKMarkerTask RRGT: apply=true weight=1
      IKMarkerTask RRMF: apply=true weight=1
      IKMarkerTask RRMT: apply=true weight=1
      IKMarkerTask RRCT: apply=true weight=1
      IKMarkerTask RRMP: apply=true weight=1
      IKMarkerTask RRFMT: apply=true weight=1
      IKMarkerTask RRMAL: apply=true weight=1
      IKMarkerTask RRMMT: apply=true weight=1
      IKMarkerTask LTC: apply=true weight=1
      IKMarkerTask LIC: apply=true weight=1
      IKMarkerTask LRGT: apply=true weight=1
      IKMarkerTask LRMF: apply=true weight=1
      IKMarkerTask LRMT: apply=true weight=1
      IKMarkerTask LRCT: apply=true weight=1
      IKMarkerTask LRMP: apply=true weight=1
      IKMarkerTask LRFMT: apply=true weight=1
      IKMarkerTask LRMal: apply=true weight=1
      IKMarkerTask LRMMT: apply=true weight=1
      IKMarkerTask RTC: apply=true weight=1
      IKMarkerTask RIC: apply=true weight=1
      IKMarkerTask RRGT: apply=true weight=1
      IKMarkerTask RRMF: apply=true weight=1
      IKMarkerTask RRMT: apply=true weight=1
      IKMarkerTask RRCT: apply=true weight=1
      IKMarkerTask RRMP: apply=true weight=1
      IKMarkerTask RRFMT: apply=true weight=1
      IKMarkerTask RRMAL: apply=true weight=1
      IKMarkerTask RRMMT: apply=true weight=1
      IKMarkerTask LTC: apply=true weight=1
      IKMarkerTask LIC: apply=true weight=1
      IKMarkerTask LRGT: apply=true weight=1
      IKMarkerTask LRMF: apply=true weight=1
      IKMarkerTask LRMT: apply=true weight=1
      IKMarkerTask LRCT: apply=true weight=1
      IKMarkerTask LRMP: apply=true weight=1
      IKMarkerTask LRFMT: apply=true weight=1
      IKMarkerTask LRMal: apply=true weight=1
      IKMarkerTask LRMMT: apply=true weight=1
      IKMarkerTask RTC: apply=true weight=1
      IKMarkerTask RIC: apply=true weight=1
      IKMarkerTask RRGT: apply=true weight=1
      IKMarkerTask RRMF: apply=true weight=1
      IKMarkerTask RRMT: apply=true weight=1
      IKMarkerTask RRCT: apply=true weight=1
      IKMarkerTask RRMP: apply=true weight=1
      IKMarkerTask RRFMT: apply=true weight=1
      IKMarkerTask RRMAL: apply=true weight=1
      IKMarkerTask RRMMT: apply=true weight=1
      IKMarkerTask LTC: apply=true weight=1
      IKMarkerTask LIC: apply=true weight=1
      IKMarkerTask LRGT: apply=true weight=1
      IKMarkerTask LRMF: apply=true weight=1
      IKMarkerTask LRMT: apply=true weight=1
      IKMarkerTask LRCT: apply=true weight=1
      IKMarkerTask LRMP: apply=true weight=1
      IKMarkerTask LRFMT: apply=true weight=1
      IKMarkerTask LRMal: apply=true weight=1
      IKMarkerTask LRMMT: apply=true weight=1
      IKMarkerTask RTC: apply=true weight=1
      IKMarkerTask RIC: apply=true weight=1
      IKMarkerTask RRGT: apply=true weight=1
      IKMarkerTask RRMF: apply=true weight=1
      IKMarkerTask RRMT: apply=true weight=1
      IKMarkerTask RRCT: apply=true weight=1
      IKMarkerTask RRMP: apply=true weight=1
      IKMarkerTask RRFMT: apply=true weight=1
      IKMarkerTask RRMAL: apply=true weight=1
      IKMarkerTask RRMMT: apply=true weight=1
      IKMarkerTask LTC: apply=true weight=1
      IKMarkerTask LIC: apply=true weight=1
      IKMarkerTask LRGT: apply=true weight=1
      IKMarkerTask LRMF: apply=true weight=1
      IKMarkerTask LRMT: apply=true weight=1
      IKMarkerTask LRCT: apply=true weight=1
      IKMarkerTask LRMP: apply=true weight=1
      IKMarkerTask LRFMT: apply=true weight=1
      IKMarkerTask LRMal: apply=true weight=1
      IKMarkerTask LRMMT: apply=true weight=1
      IKMarkerTask RTC: apply=true weight=1
      IKMarkerTask RIC: apply=true weight=1
      IKMarkerTask RRGT: apply=true weight=1
      IKMarkerTask RRMF: apply=true weight=1
      IKMarkerTask RRMT: apply=true weight=1
      IKMarkerTask RRCT: apply=true weight=1
      IKMarkerTask RRMP: apply=true weight=1
      IKMarkerTask RRFMT: apply=true weight=1
      IKMarkerTask RRMAL: apply=true weight=1
      IKMarkerTask RRMMT: apply=true weight=1
      IKMarkerTask LTC: apply=true weight=1
      IKMarkerTask LIC: apply=true weight=1
      IKMarkerTask LRGT: apply=true weight=1
      IKMarkerTask LRMF: apply=true weight=1
      IKMarkerTask LRMT: apply=true weight=1
      IKMarkerTask LRCT: apply=true weight=1
      IKMarkerTask LRMP: apply=true weight=1
      IKMarkerTask LRFMT: apply=true weight=1
      IKMarkerTask LRMal: apply=true weight=1
      IKMarkerTask LRMMT: apply=true weight=1
      IKMarkerTask RTC: apply=true weight=1
      IKMarkerTask RIC: apply=true weight=1
      IKMarkerTask RRGT: apply=true weight=1
      IKMarkerTask RRMF: apply=true weight=1
      IKMarkerTask RRMT: apply=true weight=1
      IKMarkerTask RRCT: apply=true weight=1
      IKMarkerTask RRMP: apply=true weight=1
      IKMarkerTask RRFMT: apply=true weight=1
      IKMarkerTask RRMAL: apply=true weight=1
      IKMarkerTask RRMMT: apply=true weight=1
      IKMarkerTask LTC: apply=true weight=1
      IKMarkerTask LIC: apply=true weight=1
      IKMarkerTask LRGT: apply=true weight=1
      IKMarkerTask LRMF: apply=true weight=1
      IKMarkerTask LRMT: apply=true weight=1
      IKMarkerTask LRCT: apply=true weight=1
      IKMarkerTask LRMP: apply=true weight=1
      IKMarkerTask LRFMT: apply=true weight=1
      IKMarkerTask LRMal: apply=true weight=1
      IKMarkerTask LRMMT: apply=true weight=1
      IKMarkerTask RTC: apply=true weight=1
      IKMarkerTask RIC: apply=true weight=1
      IKMarkerTask RRGT: apply=true weight=1
      IKMarkerTask RRMF: apply=true weight=1
      IKMarkerTask RRMT: apply=true weight=1
      IKMarkerTask RRCT: apply=true weight=1
      IKMarkerTask RRMP: apply=true weight=1
      IKMarkerTask RRFMT: apply=true weight=1
      IKMarkerTask RRMAL: apply=true weight=1
      IKMarkerTask RRMMT: apply=true weight=1
      IKMarkerTask LTC: apply=true weight=1
      IKMarkerTask LIC: apply=true weight=1
      IKMarkerTask LRGT: apply=true weight=1
      IKMarkerTask LRMF: apply=true weight=1
      IKMarkerTask LRMT: apply=true weight=1
      IKMarkerTask LRCT: apply=true weight=1
      IKMarkerTask LRMP: apply=true weight=1
      IKMarkerTask LRFMT: apply=true weight=1
      IKMarkerTask LRMal: apply=true weight=1
      IKMarkerTask LRMMT: apply=true weight=1
      IKMarkerTask RTC: apply=true weight=1
      IKMarkerTask RIC: apply=true weight=1
      IKMarkerTask RRGT: apply=true weight=1
      IKMarkerTask RRMF: apply=true weight=1
      IKMarkerTask RRMT: apply=true weight=1
      IKMarkerTask RRCT: apply=true weight=1
      IKMarkerTask RRMP: apply=true weight=1
      IKMarkerTask RRFMT: apply=true weight=1
      IKMarkerTask RRMAL: apply=true weight=1
      IKMarkerTask RRMMT: apply=true weight=1
      IKMarkerTask LTC: apply=true weight=1
      IKMarkerTask LIC: apply=true weight=1
      IKMarkerTask LRGT: apply=true weight=1
      IKMarkerTask LRMF: apply=true weight=1
      IKMarkerTask LRMT: apply=true weight=1
      IKMarkerTask LRCT: apply=true weight=1
      IKMarkerTask LRMP: apply=true weight=1
      IKMarkerTask LRFMT: apply=true weight=1
      IKMarkerTask LRMal: apply=true weight=1
      IKMarkerTask LRMMT: apply=true weight=1
      IKMarkerTask RTC: apply=true weight=1
      IKMarkerTask RIC: apply=true weight=1
      IKMarkerTask RRGT: apply=true weight=1
      IKMarkerTask RRMF: apply=true weight=1
      IKMarkerTask RRMT: apply=true weight=1
      IKMarkerTask RRCT: apply=true weight=1
      IKMarkerTask RRMP: apply=true weight=1
      IKMarkerTask RRFMT: apply=true weight=1
      IKMarkerTask RRMAL: apply=true weight=1
      IKMarkerTask RRMMT: apply=true weight=1
      IKMarkerTask LTC: apply=true weight=1
      IKMarkerTask LIC: apply=true weight=1
      IKMarkerTask LRGT: apply=true weight=1
      IKMarkerTask LRMF: apply=true weight=1
      IKMarkerTask LRMT: apply=true weight=1
      IKMarkerTask LRCT: apply=true weight=1
      IKMarkerTask LRMP: apply=true weight=1
      IKMarkerTask LRFMT: apply=true weight=1
      IKMarkerTask LRMal: apply=true weight=1
      IKMarkerTask LRMMT: apply=true weight=1
      IKMarkerTask RTC: apply=true weight=1
      IKMarkerTask RIC: apply=true weight=1
      IKMarkerTask RRGT: apply=true weight=1
      IKMarkerTask RRMF: apply=true weight=1
      IKMarkerTask RRMT: apply=true weight=1
      IKMarkerTask RRCT: apply=true weight=1
      IKMarkerTask RRMP: apply=true weight=1
      IKMarkerTask RRFMT: apply=true weight=1
      IKMarkerTask RRMAL: apply=true weight=1
      IKMarkerTask RRMMT: apply=true weight=1
      IKMarkerTask LTC: apply=true weight=1
      IKMarkerTask LIC: apply=true weight=1
      IKMarkerTask LRGT: apply=true weight=1
      IKMarkerTask LRMF: apply=true weight=1
      IKMarkerTask LRMT: apply=true weight=1
      IKMarkerTask LRCT: apply=true weight=1
      IKMarkerTask LRMP: apply=true weight=1
      IKMarkerTask LRFMT: apply=true weight=1
      IKMarkerTask LRMal: apply=true weight=1
      IKMarkerTask LRMMT: apply=true weight=1
