# OpenSim document version 40000
MarkerSet:
  Marker Forehead: torso (0.0959743 0.538979 0)
  Marker Sternum Upper: torso (0.03003351 0.3762437 0)
  Marker R.Shoulder: humerus_r_offset (0.00875793 0 0.0278159)
  Marker L.Shoulder: humerus_l_offset (0.00875793 0 -0.0278159)
  Marker R.ASIS: pelvis (-0.000984741 0.03 0.128204)
  Marker L.ASIS: pelvis (-0.000984741 0.03 -0.128204)
  Marker R.Knee: femur_r (0.0659099 -0.389233 0)
  Marker R.Ankle: tibia_r (0.0372025 -0.388799 0)
  Marker L.Knee: femur_l (0.0659099 -0.389233 0)
  Marker L.Ankle: tibia_l (0.0372025 -0.388799 0)
  Marker R.Elbow: humerus_r (0 -0.284019 0.0286416)
  Marker R.Radius: radius_r (-0.00448698 -0.2415819 0.04142929)
  Marker L.Radius: radius_l (-0.00448698 -0.241582 -0.0414293)
  Marker L.Elbow: humerus_l (0 -0.284019 -0.0286416)
  Marker Belt: pelvis (0 0.03 0)
