# OpenSim document version 40000
MarkerSet:
  Marker Forehead: torso (0.1105255 0.6238557 -0.007502324)
  Marker Sternum: torso (0.0448014 0.381271 0)
  Marker R.Shoulder: humerus_r_offset (0.04391478 -0.00138886 -0.007077332)
  Marker L.Shoulder: humerus_l_offset (0.04898027 -0.00138886 -0.008448711)
  Marker R.ASIS: pelvis (0.02 0.03 0.128)
  Marker L.ASIS: pelvis (0.02 0.03 -0.128)
  Marker R.Knee.Med: femur_r (0 -0.404 -0.05)
  Marker R.Ankle.Med: tibia_r (0.006 -0.3888 -0.038)
  Marker R.Heel: calcn_r (0.00699107 0.02 -0.0242826)
  Marker R.Midfoot.Lat: calcn_r (0.187388 0.010035 -0.037767)
  Marker L.Knee.Med: femur_l (0 -0.404 0.05)
  Marker L.Ankle.Med: tibia_l (0.006 -0.3888 0.038)
  Marker L.Heel: calcn_l (0.006991075 0.02 0.02428263)
  Marker L.Midfoot.Sup: calcn_l (0.1873884 0.01003505 0.03776701)
  Marker R.Elbow: humerus_r (-0.04214052 -0.2840192 0.0001621792)
  Marker R.Radius: radius_r (-0.01150659 -0.2268015 0.05069357)
  Marker R.Ulna: ulna_r (-0.02112413 -0.2388226 0.001049838)
  Marker L.Ulna: ulna_l (-0.0211241 -0.238823 0.00104984)
  Marker L.Radius: radius_l (-0.0115066 -0.226802 -0.05729466)
  Marker R.MetaCarp.3: hand_r (-0.0233963 -0.0581341 0)
  Marker L.Elbow: humerus_l (-0.0421405 -0.284019 0.000162179)
  Marker L.MetaCarp.3: hand_l (-0.0233963 -0.0581341 0)
