# OpenSim document version 40000
XsensDataReaderSettings:
  trial_prefix: MT_01200452
  ExperimentalSensors:
    ExperimentalSensor _00B4875B: name_in_model=torso_imu
    ExperimentalSensor _00B48772: name_in_model=pelvis_imu
    ExperimentalSensor _00B4876C: name_in_model=tibia_r_imu
    ExperimentalSensor _00B4876F: name_in_model=femur_r_imu
    ExperimentalSensor _00B48769: name_in_model=tibia_l_imu
    ExperimentalSensor _00B48773: name_in_model=femur_l_imu
    ExperimentalSensor _00B48761: name_in_model=calcn_r_imu
    ExperimentalSensor _00B48768: name_in_model=calcn_l_imu
    ExperimentalSensor _00B48770: name_in_model=humerus_r_imu
    ExperimentalSensor _00B4875C: name_in_model=humerus_l_imu
    ExperimentalSensor _00B4876D: name_in_model=radius_r_imu
    ExperimentalSensor _00B487B6: name_in_model=radius_l_imu
